! STIFF MASS DAMP MATRIX
! KMCR

/SOLU
ANTYPE,MODAL
MODOPT,QRDAMP,1,0
SOLVE

/INQUIRE,Jname,JOBNAME
Filename=STRLEFT(Jname(1))
/AUX2
FILE,Filename,FULL
HBMAT,K_RHS,TXT,,ASCII,STIFF,YES,YES
HBMAT,M,TXT,,ASCII,MASS,NO
HBMAT,C,TXT,,ASCII,DAMP,NO
FINISH
